// COMSOL Multiphysics 5.6.0.280 model "DLD_COMSOL.mph"
// Outline of the model tree

Parameters
  Do = 20[um]
  visc = 1e-3[Pa*s]
  dens = 1e3[kg/m^3]
  G = 40[um]
  N = 10
  Re = 10
  U = Re*visc/(dens*G)
  epsilon = 1/N
  theta = atan(epsilon)
  E = 40[um]
  R = 12*visc*L/(G^3*E)
  L = Do+G
  P = R*U*G*E

Geometry
  geom1 "Geometry 1" (2D, length unit µm)
    c1: Circle | contributeto = csel1; r = Do/2
    arr1: Array | input = c1; size = 2; type = linear; linearsize = 2; fullsize = {2, 2}; displ = {Do+G, (Do+G)*(1/N)}
    arr2: Array | input = selection csel1; size = {1, 2}; fullsize = {1, 2}; displ = {0, Do+G}
    pol1: Polygon | source = table; table = {{0, 0}, {Do+G, (Do+G)*(1/N)}, {Do+G, (Do+G)*(1+1/N)}, {0, Do+G}}
    dif1: Difference | input = pol1; input2 = selection csel1
    fin: Finalize "Form Union"

Materials
  mat1: Common "Material 1" on all domains
    def "Basic"
      density = dens
      dynamicviscosity = visc

Physics
  spf: LaminarFlow on domains 1
    dependent variable u = {u, v, w}
    fp1: FluidProperties (default)
    init1: init "Initial Values 1" (default)
    wallbc1: WallBC "Wall 1" (default)
    pfc1: PeriodicFlowCondition on boundaries 1, 4 | pdiff = P; destinationDomains: boundaries 4
    pfc2: PeriodicFlowCondition on boundaries 2, 3 | destinationDomains: boundaries 3
    prpc1: PressurePointConstraint on points 9
  g: GeneralFormPDE on domains 1
    dependent variable psi
    ShapeProperty.order = 1
    Units.DependentVariableQuantity = none
    Units.CustomDependentVariableUnit = m^2/s
    Units.CustomSourceTermUnit = 1/s
    gfeq1: GeneralFormPDE (default) | f = vx-uy; Ga = {-psix, -psiy}; da = 0
    zflx1: ZeroFluxBoundary "Zero Flux 1" (default)
    init1: init "Initial Values 1" (default)
    flux1: FluxBoundary "Flux/Source 1" on all boundaries | g = u*ny-v*nx

Mesh
  mesh1 "Mesh 1"
    size: MeshSizeDefault | table = cfd; hmax = (Do+G)/100; hmin = 0.009; hgrad = 1.08; hauto = 2; custom = on
    size1: Size on selection geom1_csel1_bnd | table = cfd; hmax = (Do+G)/100; hauto = 1; custom = on
    cr1: CornerRefinement on domains 1 | boundary = selection geom1_csel1_bnd; refinement = 0.1
    ftri1: FreeTri "Free Triangular 1" on remaining entities
    bl1: BndLayer "Boundary Layers 1" on domains 1 | sharpcorners = trim
      blp1: BndLayerProp "Boundary Layer Properties 1" on selection geom1_csel1_bnd | blnlayers = 2; blhminfact = 5

Studies
  std1 "Study 1"
    stat: Stationary | solve for = {spf}
    stat2: Stationary | solve for = {g}

Solver configurations
  sol1 "Solution 1" (study std1)
    v1: Variables "Dependent Variables 1"
    s1: Stationary "Stationary Solver 1"
      fc1: FullyCoupled | linsolver = d1; initstep = 0.01; maxiter = 100
      d1: Direct "Direct, fluid flow variables (spf)" | linsolver = pardiso; pivotperturb = 1.0E-13
    su1: StoreSolution "Solution Store 1"
    v2: Variables "Dependent Variables 2" | initmethod = sol; notsolmethod = sol
    s2: Stationary "Stationary Solver 2"
      dDef: Direct
      fc1: FullyCoupled
  sol3 "Solution Store 1" (study std1)

Datasets
  dset1: Solution | solution = sol1
  dset3: Solution | solution = sol3

Plots
  pg1: PlotGroup2D "Velocity (spf)" | data = dset1
    surf1: Surface | expr = u
    str1: Streamline | expr = {u, v}; udist = 0.02; maxsteps = 50000
  pg2: PlotGroup2D "Pressure (spf)" | data = dset1
    surf1: Surface | expr = p*L/visc/U
  pg3: PlotGroup2D "Stream Function (psi)" | data = dset1
    surf1: Surface | expr = psi/L/U
    con1: Contour | expr = psi; descr = streamlines

Exports
  data1: Data
    data = dset1
    expr = {psi/L/U, p*L/visc/U}
    unit = {1, 1}
    filename = X:\Data.csv
    sort = on
    separator = ,